# BEAM ANALYSIS by the STIFFNESS METHOD
#
# Only Pin Supports and Point Loads are included here. Distributed Loads are not included yet.
# Does not include provisions for applied moments yet.
#
# Matrix programs / routines based on ORIGIN =1.
#
# version: beta v.2026.07.20
# PROBLEM DESCRIPTION
# Problem description & details summary can be input in this box.
# Problem Description (short):
problem := "single span, 3 point loads"
# Matrix Origin Index:
ORIGIN := 1
# Begin beam positions:
# (always ZERO)
x_0 := 0 ft
MMatrix(val) :=
    if IsScalar(val)
        M[1, 1] ← val
        return M
    return val
DelDupl(arr) :=
    "Delete Duplicate elements from Array"
    i ← ORIGIN
    arr ← sort(arr)
    elem[i] ← arr[i]
    New[i] ← arr[i]
    i ← i + 1
    for j ∈ i .. last(arr)
        if arr[j] ≠ arr[j - 1]
            New[i] ← arr[j]
            i ← i + 1
    return New
InArray(x, arr) :=
    "0 = false, 1 = true"
    boo ← 0
    for i ∈ 1 .. length(arr)
        if x == arr[i]
            boo ← 1
    return boo
# End beam position (beam length):
x_end := 50 ft
# Total Beam Length
L_beam := x_end = 50 ft
# Number (qty) of result points printed along elements:
n_r := 10
# INPUT - MATERIAL
# Material Type:
material := [list choice]  # options: steel, concrete
# Modulus of Elasticity:
E := material[2] = 29000 ksi
# Section Description:
section := "W14x61"
# Moment of Inertia of Beam:
I := 640 in^4
# INPUT - SUPPORT LOCATION
# All supports assumed to be pins at this time.
# Support Position Table
table  # each column defines a variable
    x_supp (ft)
    0
    25
    50
end table
# Support Positions:
transpose(x_supp) = [0, 25, 50] ft
# Number of Supports:
n_supp := rows(x_supp) = 3
# INPUT - POINT LOAD TABLE
# Enter any number of point loads. Negative forced acting downward.
# Working Values
# Truck Axle Load(s) - UNITLESS:
P_a := 8
x_1 := 7.5
x_2 := x_1 + 6
# Point Load Input Table:
#
# (can insert rows below to add more loads)
table  # each column defines a variable
    x_Pload (ft) | P_x (lbf) | M_x (lbf*ft)
    40 | -5000 | 0
end table
check_point := "check to make sure all loads are less than the beam length"
# INPUT - DISTRIBUTED LOAD TABLE
# Enter any number of distributed loads, maintaining the (R rows x columns)
#
# DISTRIBUTED LOADS ARE NOT INCLUDED IN THE ANALYSIS YET!
# Distributed Load Input Table:
#
# (can insert rows below to add more loads)
table  # each column defines a variable
    x_wstart (ft) | x_wend (ft) | w_start (kip/ft) | w_end (kip/ft)
    0 | 4 | -1 | -1
end table
check_dist := "check to make sure all loads are less than the beam length"
# NOT INCLUDED IN ANALYSIS YET!!!
# WORKING EQUATIONS - NON-PRINTING AREA
# ASSEMBLE LOAD POSITIIONS (hidden area)
# Point load positions:
x_Pload = 12.192 m
x_Pload := MMatrix(x_Pload) = [12.192] m
P_x = -22.2411 kN
P_x := MMatrix(P_x) = [-22241.1] N
M_x = 0 kN*m
M_x := MMatrix(M_x) = [0] J
# Assembled Point Load Matrix:
M_Ploads := augment(x_Pload, P_x, M_x)
M_Ploads = [12.192 m, -22241.1 N, 0 J]
MPL_dist := M_Ploads = [12.192 m, -22241.1 N, 0 J]
# ASSEMBLE NODE POSITIIONS (hidden area)
ORIGIN = 1
# Beam End Positions:
x_beam := [x_0; x_end]
# Beam Node positions:
transpose(x_beam) = [0, 15.24] m
# Support Node positions:
transpose(x_supp) = [0, 7.62, 15.24] m
# Point Load Node positions:
transpose(x_Pload) = [12.192] m
# Node positions along Beam:
x_n := stack(x_beam, x_supp, x_Pload)
transpose(x_n) = [0, 15.24, 0, 7.62, 15.24, 12.192] m
x_n := sort(x_n)
transpose(x_n) = [0, 0, 7.62, 12.192, 15.24, 15.24] m
x_n := DelDupl(x_n)
transpose(x_n) = [0, 7.62, 12.192, 15.24] m
# Assemble Matrix of Nodes
MN_dist :=
    x ← x_n
    for i ∈ 1 .. rows(x)
        M[i, 1] ← i
        M[i, 2] ← x[i]
    return M
transpose(MN_dist) = [1, 2, 3, 4; 0 m, 7.62 m, 12.192 m, 15.24 m]
# DETERMINE NODE & SUPPORT NUMBERS & LOCATIONS (hidden area)
ORIGIN = 1
# Beam node geometry:
nodes := MN_dist[:, 1]
transpose(nodes) = [1, 2, 3, 4]
n_node := rows(MN_dist) = 4
transpose(x_supp) = [0, 7.62, 15.24] m
# Assemble Matrix of Support Nodes:
MS_node :=
    xs ← x_supp
    xn ← MN_dist[:, 2]
    for i ∈ 1 .. rows(xs)
        for j ∈ 1 .. rows(xn)
            if xs[i] == xn[j]
                new[i, 1] ← j
                new[i, 2] ← xs[i]
    return new
transpose(MS_node) = [1, 2, 4; 0 m, 7.62 m, 15.24 m]
# DETERMINE ELEMENT INFORMATION (hidden area)
ORIGIN = 1
# Total beam length:
L_beam = 15.24 m
transpose(nodes) = [1, 2, 3, 4]
# Number of Elements (Spans):
n_elem := rows(nodes) - 1 = 3
# Member indices:
elem :=
    for i ∈ 1 .. n_elem
        e[i] ← i
    return e
transpose(elem) = [1, 2, 3]
# Element Lengths:
L_e :=
    e ← n_elem
    x ← x_n
    for i ∈ 1 .. e
        j ← i + 1
        L[i] ← x[j] - x[i]
    return L
transpose(L_e) = [7.62, 4.572, 3.048] m
sum(L_e) = 15.24 m
# Element Start Nodes (all elements):
node_start :=
    e ← n_elem
    n ← nodes
    for i ∈ 1 .. e
        st[i] ← n[i]
    return st
x_start :=
    e ← n_elem
    x ← x_n
    n ← nodes
    for i ∈ 1 .. e
        st[i] ← x[i]
    return st
transpose(node_start) = [1, 2, 3]
transpose(x_start) = [0, 7.62, 12.192] m
# Element End Nodes (all elements):
node_end :=
    e ← n_elem
    n ← nodes
    for i ∈ 1 .. e
        end[i] ← n[i + 1]
    return end
x_end :=
    e ← n_elem
    x ← x_n
    n ← nodes
    for i ∈ 1 .. e
        end[i] ← x[i + 1]
    return end
transpose(node_end) = [2, 3, 4]
transpose(x_end) = [7.62, 12.192, 15.24] m
n_elem = 3
transpose(nodes) = [1, 2, 3, 4]
elemNodes(e) :=
    "elem start & end nodes"
    n ← nodes
    en[1] ← n[e]
    en[2] ← n[e + 1]
    return en
M_elem := augment(elem, node_start, node_end, x_start, x_end)
M_elem = [1, 1, 2, 0 m, 7.62 m; 2, 2, 3, 7.62 m, 12.192 m; 3, 3, 4, 12.192 m, 15.24 m]
# DEGREES OF FREEDOM - BOUNDARY CONDITIONS (hidden area)
#
# Global degree of freedom numbers (indices).
#
# (restrained nodes at support locations, etc)
ORIGIN = 1
# Degree Of Freedom Map (node numbers, element connectivity map) definition function:
node_DOFe(e) := ["elem. near node - vert. disp global DOF index"; "elem. near node - rotation global DOF index"; "elem. far node - vert. disp global DOF index"; "elem. far node - rotation global DOF index"]  # disabled
elemDOF_index(e) := [2*node_start[e] - 1; 2*node_start[e]; 2*node_end[e] - 1; 2*node_end[e]]
# check first elements DOF indices:
transpose(elemDOF_index(1)) = [1, 2, 3, 4]
transpose(elemDOF_index(2)) = [3, 4, 5, 6]
# Total number of global DOFs:
n_DOF := 2*n_node = 8
DOF_index :=
    for i ∈ 1 .. n_elem
        e ← elemDOF_index(i)
        if i == 1
            index ← e
        else
            index ← stack(index, e)
    return index
transpose(DOF_index) = [1, 2, 3, 4, 3, 4, 5, 6, 5, 6, 7, 8]
# Support Nodes (assumes PINS):
nodes_supp := MS_node[:, 1]
transpose(nodes_supp) = [1, 2, 4]
# Define Degree Of Freedom restraint assignment function:
#
# Toggle:
# 1 = restrained
# 0 = free
elemDOF_rest(e) :=
    start ← elemNodes(e)[1]
    end ← elemNodes(e)[2]
    s ← nodes_supp
    "1 = restrained, 0 = free"
    for i ∈ 1 .. 4
        dof[i] ← 0
    if InArray(start, s)
        dof[1] ← 1
    if InArray(end, s)
        dof[3] ← 1
    return dof
transpose(elemDOF_rest(1)) = [1, 0, 1, 0]
transpose(elemDOF_rest(2)) = [1, 0, 0, 0]
# SEPARATE FREE AND RESTRAINED DOFs (hidden area)
ORIGIN = 1
# Number of elements
n_elem = 3
# Assemble All Global DOF matrix from Element DOFs:
M_DOF :=
    for i ∈ 1 .. n_elem
        index ← elemDOF_index(i)
        rest ← elemDOF_rest(i)
        new ← augment(index, rest)
        if i == 1
            M ← new
        else
            M ← stack(M, new)
    "remove duplicates"
    N ← M[1, :]
    j ← 1
    current ← N[j, 1]
    for i ∈ 2 .. rows(M)
        if not InArray(M[i, 1], N[:, 1])
            current ← M[i, 1]
            j ← j + 1
            N[j, :] ← M[i, :]
    return N
transpose(M_DOF) = [1, 2, 3, 4, 5, 6, 7, 8; 1, 0, 1, 0, 0, 0, 1, 0]
transpose(MN_dist) = [1, 2, 3, 4; 0 m, 7.62 m, 12.192 m, 15.24 m]
M_DOF :=
    md ← M_DOF
    mn ← MN_dist
    j ← 1
    for i ∈ 1 .. rows(md)
        md[i, 3] ← mn[j, 1]
        md[i, 4] ← mn[j, 2]
        if mod(i, 2) == 0
            j ← j + 1
    return md
MN2_DOF :=
    md ← M_DOF
    mn ← MN_dist
    j ← 1
    for i ∈ 1 .. rows(md)
        md[i, 3] ← mn[j, 1]
        md[i, 4] ← mn[j, 2]
        if mod(i, 2) == 0
            j ← j + 1
    return md
MN2_DOF := ["DOF", "Free/Restr", "Node", "position"]  # disabled
M_DOF = [
    1, 1, 1, 0 m;
    2, 0, 1, 0 m;
    3, 1, 2, 7.62 m;
    4, 0, 2, 7.62 m;
    5, 0, 3, 12.192 m;
    6, 0, 3, 12.192 m;
    7, 1, 4, 15.24 m;
    8, 0, 4, 15.24 m
]
# Create Matrix of Free (unrestrained) DOFs:
F_DOF :=
    M ← M_DOF
    j ← 1
    for i ∈ 1 .. rows(M)
        if M[i, 2] == 0
            F[j, :] ← M[i, :]
            j ← j + 1
    return F
transpose(F_DOF) = [2, 4, 5, 6, 8; 0, 0, 0, 0, 0; 1, 2, 3, 3, 4; 0 m, 7.62 m, 12.192 m, 12.192 m, 15.24 m]
# Create Matrix of Supported(restrained) DOFs:
#
# ALL SUPPORTS ASSUMED TO BE PINNED, FOR NOW.
#
# PRESCRIBED DISPLACEMENT = 0 mm
R_DOF :=
    M ← M_DOF
    j ← 1
    for i ∈ 1 .. rows(M)
        if M[i, 2] ≠ 0
            R[j, 1] ← M[i, 1]
            R[j, 2] ← M[i, 2]
            R[j, 3] ← 0 mm
            j ← j + 1
    return R
R_DOF := ["DOF", "Free/Restr", "Enforc Disp"]  # disabled
transpose(R_DOF) = [1, 3, 7; 1, 1, 1; 0 m, 0 m, 0 m]
# DEFINE ELEMENT LOAD VECTOR (hidden area)
ORIGIN = 1
# Applied Loads (from above):
transpose(x_Pload) = [12.192] m
transpose(P_x) = [-22.2411] kN
transpose(M_x) = [0] kN*m
M_Ploads = [12.192 m, -22241.1 N, 0 J]
transpose(MN_dist) = [1, 2, 3, 4; 0 m, 7.62 m, 12.192 m, 15.24 m]
M_Ploads :=
    M ← M_Ploads
    N ← MN_dist
    n ← N[:, 1]
    pos ← N[:, 2]
    for i ∈ 1 .. rows(M)
        for j ∈ 1 .. rows(N)
            if M[i, 1] == pos[j]
                new[i] ← n[j]
    new ← augment(new, M)
    return new
M_Ploads := ["Node", "position", "Load", "Moment"]  # disabled
M_Ploads = [3, 12.192 m, -22241.1 N, 0 J]
# Element Load Vector Definition (moments not yet included):
Load_elem(e) := ["Point Load @ Start"; "Moment @ Start"; "Point Load @ End"; "Moment @ End"]  # disabled
Load_elem(e) :=
    P ← M_Ploads
    N ← P[:, 1]
    Load ← P[:, 3]
    Mom ← P[:, 4]
    start ← elemNodes(e)[1]
    end ← elemNodes(e)[2]
    for i ∈ 1 .. 4
        new[i] ← 0
    for i ∈ 1 .. last(N)
        if start == N[i]
            new[1] ← Load[i]
            new[2] ← Mom[i]
    for i ∈ 1 .. last(N)
        if end == N[i]
            new[3] ← Load[i]
            new[4] ← Mom[i]
    return new
transpose(Load_elem(1)) = [0, 0, 0, 0]
Load_elem(Elem) := ["start load", "start mom", "end load", "end mom"]  # disabled
transpose(Load_elem(2)) = [0 N, 0 N, -22241.1 N, 0 J]
# BUILD STIFFNESS MATRIX (hidden area)
#
# (contains stiffness matrix construction procedure, Assumes typical / global member stiffness (EI) definition)
# Material:
material[1] = "steel"
# Modulus of Elasticity:
# (assumes steel)
E = 1.99948e11 Pa
# Beam Moment of Inertia:
# (assumed)
I = 0.000266388 m^4
# Beam Stiffness:
# (assumed typical for beam)
EI := E*I = 53263760 kg*m^3/s^2
EI_n := EI/(kg*m^3/s^2) = 53263760
DOF := [1, 2, 3, 4]  # disabled
DOF := [1; 2; 3; 4]  # disabled
K := [
    force/disp, force/rot, force/disp, force/rot;
    mom/disp, mom/rot, mom/disp, mom/rot;
    force/disp, force/rot, force/disp, force/rot;
    mom/disp, mom/rot, force/disp, mom/rot
]  # disabled
K(SIunits) := [kg/s^2, N, kg/s^2, N; N, N*m, N, N*m; kg/s^2, N, kg/s^2, N; N, N*m, N, N*m]  # disabled
# Beam stiffness matrix definition function:
k_beam(L) := EI/L^3*[12, 6*L, -12, 6*L; 6*L, 4*L^2, -6*L, 2*L^2; -12, -6*L, 12, -6*L; 6*L, 2*L^2, -6*L, 4*L^2]
# Element stiffness matrix definition function:
Lelem := L_e
k_elem(e) := k_beam(Lelem[e])
# check first element stiffness matrix
k_elem(1) = [
    1444602 kg/s^2, 5503933 N, -1444602 kg/s^2, 5503933 N;
    5503933 N, 27959979 J, -5503933 N, 13979990 J;
    -1444602 kg/s^2, -5503933 N, 1444602 kg/s^2, -5503933 N;
    5503933 N, 13979990 J, -5503933 N, 27959979 J
]
k_elem(2) = [
    6687971 kg/s^2, 15288702 N, -6687971 kg/s^2, 15288702 N;
    15288702 N, 46599965 J, -15288702 N, 23299983 J;
    -6687971 kg/s^2, -15288702 N, 6687971 kg/s^2, -15288702 N;
    15288702 N, 23299983 J, -15288702 N, 46599965 J
]
# Create empty stiffness matrix with correct units  (same dimensions as system DOF):
K_0 := 0*identity(n_DOF)
K_0 :=
    for i ∈ 1 .. n_DOF
        for j ∈ 1 .. n_DOF
            if mod(i, 2) ≠ 0
                if mod(j, 2) ≠ 0
                    k[i, j] ← 0 kg/s^2
                else
                    k[i, j] ← 0 N
            else
                if mod(j, 2) ≠ 0
                    k[i, j] ← 0 N
                else
                    k[i, j] ← 0 N*m
    return k
K_0 = [
    0 kg/s^2, 0 N, 0 kg/s^2, 0 N, 0 kg/s^2, 0 N, 0 kg/s^2, 0 N;
    0 N, 0 J, 0 N, 0 J, 0 N, 0 J, 0 N, 0 J;
    0 kg/s^2, 0 N, 0 kg/s^2, 0 N, 0 kg/s^2, 0 N, 0 kg/s^2, 0 N;
    0 N, 0 J, 0 N, 0 J, 0 N, 0 J, 0 N, 0 J;
    0 kg/s^2, 0 N, 0 kg/s^2, 0 N, 0 kg/s^2, 0 N, 0 kg/s^2, 0 N;
    0 N, 0 J, 0 N, 0 J, 0 N, 0 J, 0 N, 0 J;
    0 kg/s^2, 0 N, 0 kg/s^2, 0 N, 0 kg/s^2, 0 N, 0 kg/s^2, 0 N;
    0 N, 0 J, 0 N, 0 J, 0 N, 0 J, 0 N, 0 J
]
# Global stiffness matrix:
K_G :=
    K ← K_0
    for e ∈ 1 .. n_elem
        d ← elemDOF_index(e)
        for i ∈ 1 .. 4
            for j ∈ 1 .. 4
                I ← d[i]
                J ← d[j]
                K[I, J] ← K[I, J] + k_elem(e)[i, j]
    return K
K_G = [
    1444602 kg/s^2, 5503933 N, -1444602 kg/s^2, 5503933 N, 0 kg/s^2, 0 N, 0 kg/s^2, 0 N;
    5503933 N, 27959979 J, -5503933 N, 13979990 J, 0 N, 0 J, 0 N, 0 J;
    -1444602 kg/s^2, -5503933 N, 8132573 kg/s^2, 9784770 N, -6687971 kg/s^2, 15288702 N, 0 kg/s^2, 0 N;
    5503933 N, 13979990 J, 9784770 N, 74559944 J, -15288702 N, 23299983 J, 0 N, 0 J;
    0 kg/s^2, 0 N, -6687971 kg/s^2, -15288702 N, 29259875 kg/s^2, 19110878 N, -22571903 kg/s^2, 34399580 N;
    0 N, 0 J, 15288702 N, 23299983 J, 19110878 N, 116499913 J, -34399580 N, 34949974 J;
    0 kg/s^2, 0 N, 0 kg/s^2, 0 N, -22571903 kg/s^2, -34399580 N, 22571903 kg/s^2, -34399580 N;
    0 N, 0 J, 0 N, 0 J, 34399580 N, 34949974 J, -34399580 N, 69899948 J
]
# EXTRACT FREE & RESTRAINED STIFFNESS MATRIX DOFs (hidden area)
transpose(F_DOF) = [2, 4, 5, 6, 8; 0, 0, 0, 0, 0; 1, 2, 3, 3, 4; 0 m, 7.62 m, 12.192 m, 12.192 m, 15.24 m]
K_F :=
    F ← F_DOF[:, 1]
    K ← K_G
    for i ∈ 1 .. rows(F)
        r ← F[i]
        k ← K[r, :]
        if i == 1
            KF1 ← k
        else
            KF1 ← stack(KF1, k)
    K ← KF1
    for i ∈ 1 .. rows(F)
        c ← F[i]
        k ← K[:, c]
        if i == 1
            KF2 ← k
        else
            KF2 ← augment(KF2, k)
    return KF2
K_R :=
    R ← R_DOF[:, 1]
    K ← K_G
    for i ∈ 1 .. rows(R)
        r ← R[i]
        k ← K[r, :]
        if i == 1
            KR1 ← k
        else
            KR1 ← stack(KR1, k)
    K ← KR1
    for i ∈ 1 .. rows(R)
        c ← R[i]
        k ← K[:, c]
        if i == 1
            KR2 ← k
        else
            KR2 ← augment(KR2, k)
    return KR2
.
K_F = [
    27959979 J, 13979990 J, 0 N, 0 J, 0 J;
    13979990 J, 74559944 J, -15288702 N, 23299983 J, 0 J;
    0 N, -15288702 N, 29259875 kg/s^2, 19110878 N, 34399580 N;
    0 J, 23299983 J, 19110878 N, 116499913 J, 34949974 J;
    0 J, 0 J, 34399580 N, 34949974 J, 69899948 J
]
K_R = [1444602, -1444602, 0; -1444602, 8132573, 0; 0, 0, 22571903] kg/s^2
# BUILD GLOBAL LOAD VECTOR
# (hidden area contains stiffness matrix construction procedure)
ORIGIN = 1
# Number of DOFs:
n_DOF = 8
# Point Loads Matrix:
M_Ploads = [3, 12.192 m, -22241.1 N, 0 J]
node_Pload :=
    p ← x_Pload
    n ← x_n
    for i ∈ 1 .. rows(p)
        for j ∈ 1 .. rows(n)
            if p[i] == n[j]
                N[i] ← j
    return N
# Point Load Nodes:
transpose(node_Pload) = [3]
# Vertical Displacement DOF (Loads):
DOF_vert(i) :=
    n ← node_Pload
    2*n[i] - 1
DOF_vert(1) = 5
# Rotational DOF (Loads):
DOF_rot(i) :=
    n ← node_Pload
    2*n[i]
DOF_rot(1) = 6
# Create Point Load zero vector - units assignment (match K length):
F :=
    for i ∈ 1 .. n_DOF
        if mod(i, 2) ≠ 0
            F[i] ← 0 N
        else if mod(i, 2) == 0
            F[i] ← 0 N*m
    return F
transpose(F) = [0 N, 0 J, 0 N, 0 J, 0 N, 0 J, 0 N, 0 J]
# THIS NEGLECTS ANY APPLIED MOMENTS
PLoad_DOF :=
    P ← M_Ploads[:, 3]
    M ← M_Ploads[:, 4]
    for i ∈ 1 .. rows(node_Pload)
        v ← DOF_vert(i)
        r ← DOF_rot(i)
        F[v] ← F[v] + P[i]
        F[r] ← F[r] + M[i]
    return F
# Point Loads related to DOFs:
transpose(PLoad_DOF) = [0 N, 0 J, 0 N, 0 J, -22241.1 N, 0 J, 0 N, 0 J]
# EXTRACT THE FREE LOAD VECTOR FROM THE GLOBAL LOAD VECTOR (hidden area)
ORIGIN = 1
transpose(F_DOF) = [2, 4, 5, 6, 8; 0, 0, 0, 0, 0; 1, 2, 3, 3, 4; 0 m, 7.62 m, 12.192 m, 12.192 m, 15.24 m]
transpose(PLoad_DOF) = [0 N, 0 J, 0 N, 0 J, -22241.1 N, 0 J, 0 N, 0 J]
PLoad_free :=
    dof ← F_DOF[:, 1]
    P ← PLoad_DOF[:, 1]
    for i ∈ 1 .. rows(dof)
        for j ∈ 1 .. rows(P)
            if dof[i] == j
                load[i] ← P[j]
    return load
transpose(PLoad_free) = [0 J, 0 J, -22241.1 N, 0 J, 0 J]
# SOLVE FOR FREE DISPLACEMENTS (hidden area)
ORIGIN = 1
transpose(F_DOF) = [2, 4, 5, 6, 8; 0, 0, 0, 0, 0; 1, 2, 3, 3, 4; 0 m, 7.62 m, 12.192 m, 12.192 m, 15.24 m]
Force := Stiffness*Displacement  # error: This variable is undefined. Check that the label is set correctly.; disabled
K_F = [
    27959979 J, 13979990 J, 0 N, 0 J, 0 J;
    13979990 J, 74559944 J, -15288702 N, 23299983 J, 0 J;
    0 N, -15288702 N, 29259875 kg/s^2, 19110878 N, 34399580 N;
    0 J, 23299983 J, 19110878 N, 116499913 J, 34949974 J;
    0 J, 0 J, 34399580 N, 34949974 J, 69899948 J
]
# Solve for free displacements:
d_F := lsolve(K_F, PLoad_free)
transpose(d_F) = [0.00033944, -0.000678879, -0.00267817 m, 0.000211422, 0.00121228]
# ASSEMBLE FREE & RESTRAINED DISPLACEMENT MATRIX (hidden area)
ORIGIN = 1
# Free (unrestrained) DOFs:
transpose(F_DOF) = [2, 4, 5, 6, 8; 0, 0, 0, 0, 0; 1, 2, 3, 3, 4; 0 m, 7.62 m, 12.192 m, 12.192 m, 15.24 m]
F_DOF :=
    d ← d_F
    f ← F_DOF
    for i ∈ 1 .. rows(f)
        new[i, 1] ← f[i, 1]
        new[i, 2] ← f[i, 2]
        new[i, 3] ← d[i]
    return new
# Free (unrestrained) DOFs and calculated displacements:
transpose(F_DOF) = [2, 4, 5, 6, 8; 0, 0, 0, 0, 0; 0.00033944, -0.000678879, -0.00267817 m, 0.000211422, 0.00121228]
# Restrained (supported) DOFs and enforced displacements:
transpose(R_DOF) = [1, 3, 7; 1, 1, 1; 0 m, 0 m, 0 m]
d_DOF := csort(stack(F_DOF, R_DOF), 1)
d_DOF = [
    1, 1, 0 m;
    2, 0, 0.00033944;
    3, 1, 0 m;
    4, 0, -0.000678879;
    5, 0, -0.00267817 m;
    6, 0, 0.000211422;
    7, 1, 0 m;
    8, 0, 0.00121228
]
# REACTION OUTPUT EQUATIONS - NON-PRINTING AREA
# SOLVE FOR Shear Force values and Reactions at specified DOFs (hidden area)
ORIGIN = 1
Force := Stiffness*Displacement  # error: This variable is undefined. Check that the label is set correctly.; disabled
d := d_DOF[:, 3]
# DOF Force Matrix
Force_DOF := K_G*d
transpose(Force_DOF) = [-1868.25 N, 0 J, 12632.9 N, -9.09495e-13 J, -22241.1 N, 7.27596e-12 J, 11476.4 N, 0 J]
M_DOF := ["DOF", "Free/Restr", "Node", "position"]  # disabled
# DOF matrix:
M_DOF = [
    1, 1, 1, 0 m;
    2, 0, 1, 0 m;
    3, 1, 2, 7.62 m;
    4, 0, 2, 7.62 m;
    5, 0, 3, 12.192 m;
    6, 0, 3, 12.192 m;
    7, 1, 4, 15.24 m;
    8, 0, 4, 15.24 m
]
# Reaction Forces at DOFs:
REAC_DOF := Force_DOF - PLoad_DOF
transpose(REAC_DOF) = [-1868.25 N, 0 J, 12632.9 N, -9.09495e-13 J, 3.63798e-12 N, 7.27596e-12 J, 11476.4 N, 0 J]
R_DOF := ["DOF", "Free/Restr", "Enforc Disp"]  # disabled
transpose(R_DOF) = [1, 3, 7; 1, 1, 1; 0 m, 0 m, 0 m]
transpose(MS_node) = [1, 2, 4; 0 m, 7.62 m, 15.24 m]
# Reactions at DOFs:
Reactions_DOF :=
    R1 ← R_DOF
    R2 ← REAC_DOF
    for i ∈ 1 .. rows(R1)
        for j ∈ 1 .. rows(R2)
            if R1[i, 1] == j
                new[i, 1] ← R1[i, 1]
                new[i, 2] ← R2[j]
    return new
transpose(Reactions_DOF) = [1, 3, 7; -1868.25 N, 12632.9 N, 11476.4 N]
# Vertical Reactions at nodes:
Reactions_node :=
    R1 ← MS_node
    new ← R1
    R2 ← Reactions_DOF
    for i ∈ 1 .. rows(R1)
        new[i, 3] ← R2[i, 2]
    return new
Reactions_node := ["Node", "position", "vert. reaction"]  # disabled
transpose(Reactions_node) = [1, 2, 4; 0 m, 7.62 m, 15.24 m; -1868.25 N, 12632.9 N, 11476.4 N]
ReacOut_node := Reactions_node[:, 1]
ReacOut_pos := Reactions_node[:, 2]
ReacOut_force := Reactions_node[:, 3]
# SHEAR OUTPUT EQUATIONS - NON-PRINTING AREA
# SOLVE FOR Shear Force values along length of beam (hidden area)
#
# AS OF THIS BETA VERSION, ANALYSIS MODEL AND RESULTES DO NOT INCLUDE DISTRIBUTED LOADS.
ORIGIN = 1
x_end = [7.62; 12.192; 15.24] m
L_beam = 15.24 m
n_r = 10
# DOF matrix:
M_DOF = [
    1, 1, 1, 0 m;
    2, 0, 1, 0 m;
    3, 1, 2, 7.62 m;
    4, 0, 2, 7.62 m;
    5, 0, 3, 12.192 m;
    6, 0, 3, 12.192 m;
    7, 1, 4, 15.24 m;
    8, 0, 4, 15.24 m
]
# Updated DOF matrix:
M_DOF :=
    DOF ← M_DOF
    Force ← Force_DOF
    for i ∈ 1 .. rows(DOF)
        DOF[i, 5] ← Force[i]
    return DOF
M_DOF := ["DOF", "Free/Restr", "Node", "position", "force"]  # disabled
M_DOF = [
    1, 1, 1, 0 m, -1868.25 N;
    2, 0, 1, 0 m, 0 J;
    3, 1, 2, 7.62 m, 12632.9 N;
    4, 0, 2, 7.62 m, -9.09495e-13 J;
    5, 0, 3, 12.192 m, -22241.1 N;
    6, 0, 3, 12.192 m, 7.27596e-12 J;
    7, 1, 4, 15.24 m, 11476.4 N;
    8, 0, 4, 15.24 m, 0 J
]
# DOF matrix of vertical loads and reactions:
M_VDOF :=
    DOF ← M_DOF
    j ← 1
    for i ∈ 1 .. rows(DOF)
        if mod(DOF[i, 1], 2) == 1
            new[j, :] ← DOF[i, :]
            j ← j + 1
    return new
M_VDOF := ["DOF", "restrained?", "node", "position", "force"]  # disabled
M_VDOF = [
    1, 1, 1, 0 m, -1868.25 N;
    3, 1, 2, 7.62 m, 12632.9 N;
    5, 0, 3, 12.192 m, -22241.1 N;
    7, 1, 4, 15.24 m, 11476.4 N
]
M_elem := ["element", "start node", "end node", "start pos.", "end pos."]  # disabled
# Matrix of node information:
transpose(MN_dist) = [1, 2, 3, 4; 0 m, 7.62 m, 12.192 m, 15.24 m]
# Shear Forces at node Left & Right:
V_node :=
    DOF ← M_VDOF
    node ← MN_dist
    for i ∈ 1 .. rows(node)
        new[i, 1] ← node[i, 1]
        new[i, 2] ← node[i, 2]
        if i == 1
            V ← 0 N
        for j ∈ 1 .. rows(DOF)
            if node[i, 1] == DOF[j, 3]
                new[i, 3] ← V
                V ← V + DOF[j, 5]
                new[i, 4] ← V
    return new
# AS OF YET, DISTRIBUTED LOADS ARE NOT INCLUDED IN THE ANALYSIS.
V_elem := ["Node", "position", "Left force", "Right force"]  # disabled
V_node = [
    1, 0 m, 0 N, -1868.25 N;
    2, 7.62 m, -1868.25 N, 10764.7 N;
    3, 12.192 m, 10764.7 N, -11476.4 N;
    4, 15.24 m, -11476.4 N, 0 N
]
Vout_node := V_node[:, 1]
Vout_pos := V_node[:, 2]
Vout_left := V_node[:, 3]
Vout_right := V_node[:, 4]
V_plot :=
    V ← V_node
    left ← V[:, 3]
    right ← V[:, 4]
    j ← 0
    for i ∈ 1 .. rows(V)
        j ← j + 1
        new[j] ← left[i]
        j ← j + 1
        new[j] ← right[i]
    return new
x_plot :=
    V ← V_node
    x ← V[:, 2]
    j ← 0
    for i ∈ 1 .. rows(x)
        j ← j + 1
        new[j] ← x[i]
        j ← j + 1
        new[j] ← x[i]
    return new
transpose(x_plot) = [0, 0, 7.62, 7.62, 12.192, 12.192, 15.24, 15.24] m
transpose(V_plot) = [0, -1868.25, -1868.25, 10764.7, 10764.7, -11476.4, -11476.4, 0] N
# MOMENT OUTPUT EQUATIONS - NON-PRINTING AREA
# SOLVE FOR Moment Force values along length of beam (hidden area)
#
# AS OF THIS BETA VERSION, ANALYSIS MODEL AND RESULTES DO NOT INCLUDE DISTRIBUTED LOADS.
# AS OF YET, DISTRIBUTED LOADS ARE NOT INCLUDED IN THE ANALYSIS.
ORIGIN = 1
# Number (qty) of result points printed along elements:
n_r = 10
# DOF matrix of vertical loads and reactions:
M_VDOF := ["DOF", "restrained?", "node", "position", "force"]  # disabled
M_VDOF = [
    1, 1, 1, 0 m, -1868.25 N;
    3, 1, 2, 7.62 m, 12632.9 N;
    5, 0, 3, 12.192 m, -22241.1 N;
    7, 1, 4, 15.24 m, 11476.4 N
]
# Moments along beam, loads applied a element ends (nodes).:
Mpnt(x) :=
    V ← M_VDOF
    n ← V[:, 3]
    p ← V[:, 4]
    F ← V[:, 5]
    M ← 0 N*m
    for i ∈ 1 .. rows(V)
        if p[i] ≤ x
            M ← M + F[i]*(x - p[i])
    return M
xM_plot :=
    nr ← n_r
    nn ← M_VDOF[:, 4]
    new1 ← nn
    for i ∈ 1 .. rows(nn) - 1
        l ← nn[i + 1] - nn[i]
        d[i] ← l/nr
        for j ∈ 1 .. nr - 2
            new2[j] ← nn[i] + j*d[i]
        new2 ← stack(new1, new2)
    new2 ← sort(new2)
    return new2
transpose(xM_plot) = [0, 3.81, 4.572, 5.334, 6.096, 7.62, 9.906, 10.3632, 10.8204, 11.2776, 12.192, 12.4968, 12.8016, 13.1064, 13.4112, 13.716, 14.0208, 14.3256, 14.6304, 15.24] m
yM_plot :=
    x ← xM_plot
    for i ∈ 1 .. rows(x)
        y[i] ← Mpnt(x[i])
    return y
transpose(xM_plot) = [0, 12.5, 15, 17.5, 20, 25, 32.5, 34, 35.5, 37, 40, 41, 42, 43, 44, 45, 46, 47, 48, 50] ft
transpose(yM_plot) = [0, -5250, -6300, -7350, -8400, -10500, 7650, 11280, 14910, 18540, 25800, 23220, 20640, 18060, 15480, 12900, 10320, 7740, 5160, 0] lbf*ft
Mout := yM_plot
# OUTPUT - SUPPORT REACTIONS
Reactions_node := ["Node", "position", "vert. reaction"]  # disabled
# Node, position, and vert. reaction:
transpose(Reactions_node) = [1, 2, 4; 0 m, 7.62 m, 15.24 m; -1868.25 N, 12632.9 N, 11476.4 N]
transpose(ReacOut_node) = [1, 2, 4]
transpose(ReacOut_pos) = [0, 25, 50] ft
transpose(ReacOut_force) = [-0.42, 2.84, 2.58] kip
# OUTPUT - SHEAR FORCE
#
# THIS ANALYSIS DOES NOT YET INCLUDE ANY DISTRIBUTED LOADS.
V_node := ["Node", "position", "Left force", "Right force"]  # disabled
# Shear forces at nodes:
V_node = [
    1, 0 m, 0 N, -1868.25 N;
    2, 7.62 m, -1868.25 N, 10764.7 N;
    3, 12.192 m, 10764.7 N, -11476.4 N;
    4, 15.24 m, -11476.4 N, 0 N
]
transpose(Vout_node) = [1, 2, 3, 4]
transpose(Vout_pos) = [0, 25, 40, 50] ft
transpose(Vout_left) = [0, -0.42, 2.42, -2.58] kip
transpose(Vout_right) = [-0.42, 2.42, -2.58, 0] kip
# [plot: V_plot (kip) vs x_plot (ft)]
# OUTPUT - MOMENT
#
# THIS ANALYSIS DOES NOT YET INCLUDE ANY DISTRIBUTED LOADS.
# Specific / sample point:
x_s := 6.25 ft
# Moment value at specified point:
Mpnt(x_s) = -2.625 kip*ft
# Maximum Moment:
M_max := max(Mout) = 25.8 kip*ft
# Minimum Moment:
M_min := min(Mout) = -10.5 kip*ft
# [plot: yM_plot (kip*ft) vs xM_plot (ft)]
